A := 3.96083*10^-3
R := 100
B := -5.775*10^-7
T_0 := 20
C := -4.183*10^-12
R_0 := 100
T := 1/(A + B*ln(R) + C*(ln(R)^3)) + 273.15 = 525.792
T := 1/(1/T_0 + 1/B*ln(R/R_0)) + 273.15 = 293.15
b := -282
k_1 := 242.2/(120.4 - 80.3) → 6.03990024938
(R - b)/k
k_2 := 5.846
R := -0, 10 .. 150
T_1(R) := R*k_1 + b
T_2(R) := R*k_2 + b
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T_1(50) = 19.995
T_2(50) = 10.3
T_1(50) - T_2(50) = 9.69501
T_1(100) - T_2(100) = 19.39
k := 5.846
T(R) :=
    (5.846*R - 275) if 0 < R ≤ 80.3
    (6.09*R - 290.2) if 80.3 < R ≤ 120.4
    (6.78*R - 370) if 120.4 < R ≤ 150
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